OpenVSP model (file version 5), 1 components.
Geometry view with OpenVSP parameter names; values to 6 digits, angles in degrees, lengths in the model's unit.
Overall bounding box: X_Min=-0.11738 X_Len=14.3805 Y_Min=-1.42209 Y_Len=2.84419 Z_Min=-5.14026 Z_Len=8.09863

Fuselage "FuselageGeom"
  location (X Y Z) -0.655738 0 -2.7, rotation 0 10 0
  bounding box size 14.3805 2.84419 8.09863
  Design: Length=14.0529
  cross sections:
    n   XLocPercent  YLocPercent  ZLocPercent  shape
    0   0            0            0            edit curve Width=0.28875 Height=0.3465 AbsoluteFlag=0 SymType=1 cubic Bezier points (X Y): 0 11, 0 10.3, 0 10.3, 0 10.3, 0 10.3, 0 10.3, 0 11, 0 11, 0 11, 0 11, 0 11, 0 11, 0 11
    1   0.0444676    0            0            edit curve Width=0.28875 Height=0.3465 AbsoluteFlag=0 SymType=1 cubic Bezier points (X Y): 1.96 12.33, 1.96 7, 1.96 7, 0 5.49, -1.96 7, -1.96 7, -1.96 12.33, -1.96 12.33, -1.96 14.29, 0 14.29, 1.96 14.29, 1.96 12.33, 1.96 12.33
    2   0.0887265    0            0            edit curve Width=0.28875 Height=0.3465 AbsoluteFlag=0 SymType=1 cubic Bezier points (X Y): 2.7 13.02, 2.7 5, 2.7 5, 0 3.76, -2.7 5, -2.7 5, -2.7 13.02, -2.7 13.02, -2.7 15.72, 0 15.72, 2.7 15.72, 2.7 13.02, 2.7 13.02
    3   0.177453     0            0            edit curve Width=0.28875 Height=0.3465 AbsoluteFlag=0 SymType=1 cubic Bezier points (X Y): 3.68 13.68, 3.68 8.60153, 3.68 5.69951, 3.68 3.99, 2.253 3.15556, 1.5201 2.72577, 0 1.83, -1.5201 2.72577, -2.253 3.15556, -3.68 3.99, -3.68 5.69951, -3.68 8.60153, -3.68 13.68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
    4   0.26618      0            0            edit curve Width=0.28875 Height=0.3465 AbsoluteFlag=0 SymType=1 cubic Bezier points (X Y): 4.3 14.11, 4.3 8.60153, 4.3 5.69951, 4.3 2.93, 2.74732 2.13793, 2.02009 1.80125, 0 0.8, -2.02009 1.80125, -2.74732 2.13793, -4.3 2.93, -4.3 5.69951, -4.3 8.60153, -4.3 14.11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
    5   0.354906     0            0            edit curve Width=0.28875 Height=0.3465 AbsoluteFlag=0 SymType=1 cubic Bezier points (X Y): 4.7 14.42, 4.7 8.60153, 4.7 5.69951, 4.7 2.15, 2.80214 1.4204, 2.1953 1.18243, 0 0.27, -2.1953 1.18243, -2.80214 1.4204, -4.7 2.15, -4.7 5.69951, -4.7 8.60153, -4.7 14.42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
    6   0.443633     0            0            edit curve Width=0.28875 Height=0.3465 AbsoluteFlag=0 SymType=1 cubic Bezier points (X Y): 4.89 14.71, 4.89 8.60153, 4.89 5.69951, 4.89 1.83, 2.89988 1.10829, 2.2999 0.89163, 0 0.04, -2.2999 0.89163, -2.89988 1.10829, -4.89 1.83, -4.89 5.69951, -4.89 8.60153, -4.89 14.71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
    7   0.4881       0            0            edit curve Width=0.28875 Height=0.3465 AbsoluteFlag=0 SymType=1 cubic Bezier points (X Y): 4.925 14.86, 4.925 8.60153, 4.925 5.69951, 4.925 1.8, 2.89423 1.06406, 2.36801 0.857694, 0 0, -2.36801 0.857694, -2.89423 1.06406, -4.925 1.8, -4.925 5.69951, -4.925 8.60153, -4.925 14.86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
    8   0.532359     0            0            edit curve Width=0.28875 Height=0.3465 AbsoluteFlag=0 SymType=1 cubic Bezier points (X Y): 4.9 15, 4.9 8.60153, 4.9 5.69951, 4.9 1.77, 2.86328 1.03826, 2.35253 0.844796, 0 0, -2.35253 0.844796, -2.86328 1.03826, -4.9 1.77, -4.9 5.69951, -4.9 8.60153, -4.9 15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
    9   0.621086     0            0            edit curve Width=0.28875 Height=0.3465 AbsoluteFlag=0 SymType=1 cubic Bezier points (X Y): 4.67 15.31, 4.67 8.60153, 4.67 5.69951, 4.67 1.68, 2.63323 0.947904, 2.3109 0.839954, 0 0, -2.3109 0.839954, -2.63323 0.947904, -4.67 1.68, -4.67 5.69951, -4.67 8.60153, -4.67 15.31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
    10  0.665344     0            0            edit curve Width=0.28875 Height=0.3465 AbsoluteFlag=0 SymType=1 cubic Bezier points (X Y): 4.45 15.55, 4.45 8.60153, 4.45 5.69951, 4.45 1.62, 2.67755 0.960875, 2.3061 0.819001, 0 0, -2.3061 0.819001, -2.67755 0.960875, -4.45 1.62, -4.45 5.69951, -4.45 8.60153, -4.45 15.55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
    11  0.709812     0            0            edit curve Width=0.28875 Height=0.3465 AbsoluteFlag=0 SymType=1 cubic Bezier points (X Y): 4.15 15.83, 4.15 8.60153, 4.15 5.69951, 4.15 1.5, 2.49074 0.897354, 2.00019 0.736677, 0 0, -2.00019 0.736677, -2.49074 0.897354, -4.15 1.5, -4.15 5.69951, -4.15 8.60153, -4.15 15.83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
    12  0.798539     0            0            edit curve Width=0.28875 Height=0.3465 AbsoluteFlag=0 SymType=1 cubic Bezier points (X Y): 3.28 16.23, 3.28 8.60153, 3.28 5.69951, 3.28 1.19, 1.83422 0.668298, 1.54634 0.558629, 0 0, -1.54634 0.558629, -1.83422 0.668298, -3.28 1.19, -3.28 5.69951, -3.28 8.60153, -3.28 16.23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
    13  0.887265     0            0            edit curve Width=0.28875 Height=0.3465 AbsoluteFlag=0 SymType=1 cubic Bezier points (X Y): 1.98 16.9, 1.98 8.60153, 1.98 5.69951, 1.98 0.72, 1.20329 0.45411, 1.03068 0.388356, 0 0, -1.03068 0.388356, -1.20329 0.45411, -1.98 0.72, -1.98 5.69951, -1.98 8.60153, -1.98 16.9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
    14  0.975992     0            0            edit curve Width=0.28875 Height=0.3465 AbsoluteFlag=0 SymType=1 cubic Bezier points (X Y): 0.43 17.7, 0.43 8.60153, 0.43 5.69951, 0.43 0.15, 0.255742 0.0881683, 0.211604 0.0741046, 0 0, -0.211604 0.0741046, -0.255742 0.0881683, -0.43 0.15, -0.43 5.69951, -0.43 8.60153, -0.43 17.7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
    15  1            0            0            edit curve Width=0.28875 Height=0.3465 AbsoluteFlag=0 SymType=1 cubic Bezier points (X Y): 0 17.94, 0 8.60153, 0 5.69951, 0 0.15, 0 0.0898226, 0 0.0730557, 0 0, 0 0.0730557, 0 0.0898226, 0 0.15, 0 5.69951, 0 8.60153, 0 17.94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

VSPAERO settings: Sref=435.847 bref=21.45 cref=18.554 Xcg=6.9045 Ycg=0 Zcg=-0.581682 AlphaStart=0 AlphaEnd=0 AlphaNpts=1 BetaStart=0 BetaEnd=0 BetaNpts=1 MachStart=0.4 MachEnd=0.3 MachNpts=1 ReCref=1e+07 Vinf=100 Rho=0.002377
