OpenVSP model (file version 5), 1 components.
Geometry view with OpenVSP parameter names; values to 6 digits, angles in degrees, lengths in the model's unit.
Overall bounding box: X_Min=0 X_Len=112.141 Y_Min=-6.025 Y_Len=12.05 Z_Min=0 Z_Len=38.4

Fuselage "NACA Tank Model 237-6SB"
  location (X Y Z) 0 0 0, rotation 0 0 0
  bounding box size 112.141 12.05 38.4
  Design: Length=112.141
  cross sections:
    n   XLocPercent  YLocPercent  ZLocPercent  shape
    0   0            0            0            edit curve Width=2.5 Height=3 AbsoluteFlag=0 SymType=1 cubic Bezier points (X Y): 0 2.8, 0 2.8, 0 2.8, 0 2.8, 0 2.8, 0 2.8, 0 2.8, 0 2.8, 0 2.8, 0 2.8, 0 2.8, 0 2.8, 0 2.8
    1   0.0375991    0            0            edit curve Width=2.5 Height=3 AbsoluteFlag=0 SymType=1 cubic Bezier points (X Y): 1.08 2.64, 0.707377 2.34776, 0.390277 2.08351, 0 1.8, -0.390277 2.08351, -0.707377 2.34776, -1.08 2.64, -1.08 3.16084, -1.08 3.76, 0 3.76, 1.08 3.76, 1.08 3.16084, 1.08 2.64
    2   0.0976217    0            0            edit curve Width=2.5 Height=3 AbsoluteFlag=0 SymType=1 cubic Bezier points (X Y): 1.64 2.38, 0.923248 1.65295, 0.764564 1.50869, 0 0.76, -0.764564 1.50869, -0.923248 1.65295, -1.64 2.38, -1.65831 3.20804, -1.64 5.28, 0 5.28, 1.64 5.28, 1.65831 3.20804, 1.64 2.38
    3   0.157644     0            0            edit curve Width=2.5 Height=3 AbsoluteFlag=0 SymType=1 cubic Bezier points (X Y): 2.01 2.11, 1.16501 1.28214, 0.937073 1.08164, 0 0.2, -0.937073 1.08164, -1.16501 1.28214, -2.01 2.11, -2.01 3.25587, -2.01 6.84, 0 6.84, 2.01 6.84, 2.01 3.25587, 2.01 2.11
    4   0.217894     0            0            edit curve Width=2.5 Height=3 AbsoluteFlag=0 SymType=1 cubic Bezier points (X Y): 2.24 1.84, 1.41873 1.15744, 1.20413 0.998476, 0 0, -1.20413 0.998476, -1.41873 1.15744, -2.24 1.84, -2.24 3.16084, -2.24 8.35, 0 8.35, 2.24 8.35, 2.24 3.16084, 2.24 1.84
    5   0.277916     0            0            edit curve Width=2.5 Height=3 AbsoluteFlag=0 SymType=1 cubic Bezier points (X Y): 2.36 1.6, 1.32649 0.882493, 1.09197 0.742027, 0 0, -1.09197 0.742027, -1.32649 0.882493, -2.36 1.6, -2.36 3.16084, -2.36 9.72, 0 9.72, 2.36 9.72, 2.36 3.16084, 2.36 1.6
    6   0.338618     0            0            edit curve Width=2.5 Height=3 AbsoluteFlag=0 SymType=1 cubic Bezier points (X Y): 2.41 1.34, 1.31224 0.740676, 1.04521 0.600806, 0 0, -1.04521 0.600806, -1.31224 0.740676, -2.41 1.34, -2.41 3.16084, -2.41 10.8, 0 10.8, 2.41 10.8, 2.41 3.16084, 2.41 1.34
    7   0.389128     0            0            edit curve Width=2.5 Height=3 AbsoluteFlag=0 SymType=1 cubic Bezier points (X Y): 2.34 1.14, 1.32658 0.634932, 1.15397 0.544521, 0 0, -1.15397 0.544521, -1.32658 0.634932, -2.34 1.14, -2.41 3.16084, -2.41 11.52, 0 11.52, 2.41 11.52, 2.41 3.16084, 2.34 1.14
    8   0.458664     0            0            edit curve Width=2.5 Height=3 AbsoluteFlag=0 SymType=1 cubic Bezier points (X Y): 2.12 0.82, 1.30685 0.503425, 0.996164 0.388356, 0 0, -0.996164 0.388356, -1.30685 0.503425, -2.12 0.82, -2.41 3.16084, -2.41 12.18, 0 12.18, 2.41 12.18, 2.41 3.16084, 2.12 0.82
    9   0.518913     0            0            edit curve Width=2.5 Height=3 AbsoluteFlag=0 SymType=1 cubic Bezier points (X Y): 1.73 0.58, 1.05382 0.353182, 0.710631 0.234011, 0 0, -0.710631 0.234011, -1.05382 0.353182, -1.73 0.58, -2.41 3.16084, -2.41 12.56, 0 12.56, 2.41 12.56, 2.41 3.16084, 1.73 0.58
    10  0.578709     0            0            edit curve Width=2.5 Height=3 AbsoluteFlag=0 SymType=1 cubic Bezier points (X Y): 1.04 0.28, 0.611734 0.16339, 0.462289 0.124036, 0 0, -0.462289 0.124036, -0.611734 0.16339, -1.04 0.28, -2.41 3.16084, -2.41 12.78, 0 12.78, 2.41 12.78, 2.41 3.16084, 1.04 0.28
    11  0.655493     0            0            edit curve Width=2.5 Height=3 AbsoluteFlag=0 SymType=1 cubic Bezier points (X Y): 0.03 0, 0.02 0, 0.01 0, 0 0, -0.01 0, -0.02 0, -0.03 0, -2.41 3.1608, -2.41 12.78, 0 12.78, 2.41 12.78, 2.41 3.1608, 0.03 0
    12  0.699434     0            0            edit curve Width=2.5 Height=3 AbsoluteFlag=0 SymType=1 cubic Bezier points (X Y): 0.03 1.1, 0.02 1.1, 0.01 1.1, 0 1.1, -0.01 1.1, -0.02 1.1, -0.03 1.1, -2.41 3.1608, -2.41 12.8, 0 12.8, 2.41 12.8, 2.41 3.1608, 0.03 1.1
    13  0.759456     0            0            edit curve Width=2.5 Height=3 AbsoluteFlag=0 SymType=1 cubic Bezier points (X Y): 0.03 2.62, 0.02 2.62, 0.01 2.62, 0 2.62, -0.01 2.62, -0.02 2.62, -0.03 2.62, -2.41 3.1608, -2.41 12.66, 0 12.66, 2.41 12.66, 2.41 3.1608, 0.03 2.62
    14  0.819479     0            0            edit curve Width=2.5 Height=3 AbsoluteFlag=0 SymType=1 cubic Bezier points (X Y): 0.03 4.15, 0.02 4.15, 0.01 4.15, 0 4.15, -0.01 4.15, -0.02 4.15, -0.03 4.15, -2.41 4.15, -2.41 12.52, 0 12.52, 2.41 12.52, 2.41 4.15, 0.03 4.15
    15  0.879728     0            0            edit curve Width=2.5 Height=3 AbsoluteFlag=0 SymType=1 cubic Bezier points (X Y): 0.03 5.68, 0.02 5.68, 0.01 5.68, 0 5.68, -0.01 5.68, -0.02 5.68, -0.03 5.68, -2.41 5.68, -2.41 12.39, 0 12.39, 2.41 12.39, 2.41 5.68, 0.03 5.68
    16  0.939977     0            0            edit curve Width=2.5 Height=3 AbsoluteFlag=0 SymType=1 cubic Bezier points (X Y): 0.03 7.24, 0.02 7.24, 0.01 7.24, 0 7.24, -0.01 7.24, -0.02 7.24, -0.03 7.24, -2.41 7.24, -2.41 12.24, 0 12.24, 2.41 12.24, 2.41 7.24, 0.03 7.24
    17  1            0            0            edit curve Width=2.5 Height=3 AbsoluteFlag=0 SymType=1 cubic Bezier points (X Y): 0.03 8.51, 0.02 8.51, 0.01 8.51, 0 8.51, -0.01 8.51, -0.02 8.51, -0.03 8.51, -2.41 8.51, -2.41 12.11, 0 12.11, 2.41 12.11, 2.41 8.51, 0.03 8.51
