OpenVSP model (file version 5), 1 components.
Geometry view with OpenVSP parameter names; values to 6 digits, angles in degrees, lengths in the model's unit.
Overall bounding box: X_Min=441.842 X_Len=2.81871 Y_Min=-6.5593 Y_Len=13.1186 Z_Min=-6.5593 Z_Len=13.1186

Propeller "SR-7L Prop-fan"
  location (X Y Z) 443.296 0 0, rotation 0 0 0
  bounding box size 2.81871 13.1186 13.1186
  Design: Diameter=13.106 NumBlade=8 Beta34=57.66 UseBeta34Flag=1 Feather=57.57 Rotate=0 Precone=0 ReverseFlag=0 FoldAngle=0 PropMode=0 AF=227.631 CLi=0.187902 Chord=0.34645 Solidity=0.882228 ConstructXoC=0.5 FeatherAxisXoC=0.5 FeatherOffsetXoC=0
  cross sections:
    n   RadiusFrac  shape
    0   0.2         NACA 65-series A=1 Chord=2.1389 IdealCl=0 ThickChord=0.2392
    1   0.2275      NACA 65-series A=1 Chord=2.13926 IdealCl=0.0585208 ThickChord=0.2392
    2   0.24        NACA 65-series A=1 Chord=2.14437 IdealCl=0.0785 ThickChord=0.2392
    3   0.25        NACA 65-series A=1 Chord=2.15332 IdealCl=0.08 ThickChord=0.17
    4   0.2625      NACA 65-series A=1 Chord=2.17262 IdealCl=0.0806 ThickChord=0.1498
    5   0.3         NACA 65-series A=1 Chord=2.25554 IdealCl=0.0844 ThickChord=0.11
    6   0.35        NACA 65-series A=1 Chord=2.3984 IdealCl=0.0895 ThickChord=0.0812
    7   0.4         NACA 65-series A=1 Chord=2.52028 IdealCl=0.0972 ThickChord=0.065
    8   0.41        NACA 65-series A=1 Chord=2.54657 IdealCl=0.0977272 ThickChord=0.0625
    9   0.572       NACA 16-series Chord=2.73909 IdealCl=0.1395 ThickChord=0.0375
    10  0.6         NACA 16-series Chord=2.74964 IdealCl=0.1509 ThickChord=0.0345
    11  0.6136      NACA 16-series Chord=2.74559 IdealCl=0.1562 ThickChord=0.0335
    12  0.65        NACA 16-series Chord=2.71818 IdealCl=0.1722 ThickChord=0.0304
    13  0.7         NACA 16-series Chord=2.64348 IdealCl=0.19 ThickChord=0.0278
    14  0.7121      NACA 16-series Chord=2.62195 IdealCl=0.1935 ThickChord=0.0266
    15  0.75        NACA 16-series Chord=2.48883 IdealCl=0.2036 ThickChord=0.0253
    16  0.8         NACA 16-series Chord=2.25816 IdealCl=0.2134 ThickChord=0.0237
    17  0.85        NACA 16-series Chord=1.94362 IdealCl=0.2187 ThickChord=0.0227
    18  0.9         NACA 16-series Chord=1.57272 IdealCl=0.2172 ThickChord=0.0226
    19  0.95        NACA 16-series Chord=1.14677 IdealCl=0.2026 ThickChord=0.0226378
    20  0.995       NACA 16-series Chord=0.729607 IdealCl=0.17 ThickChord=0.0224
    21  1           NACA 16-series Chord=0.678891 IdealCl=0 ThickChord=0.0224
  Chord along r/R (cubic Bezier): 0.2: 0.3264, 0.216667: 0.3264, 0.233333: 0.32564, 0.25: 0.3286, 0.266667: 0.33156, 0.283333: 0.338936, 0.3: 0.3442, 0.316667: 0.349464, 0.333333: 0.359087, 0.35: 0.366, 0.366667: 0.372913, 0.383333: 0.377135, 0.4: 0.3846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
  Twist along r/R (PCHIP): 0.2: 18.38, 0.25: 18.21, 0.3: 17.17, 0.35: 15.63, 0.4: 13.58, 0.45: 11.21, 0.5: 9.05, 0.55: 6.96, 0.6: 5.40027, 0.65: 3.35, 0.7: 1.73, 0.75: 0.09, 0.8: -1.5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
  Thick along r/R (cubic Bezier): 0.2: 0.2392, 0.213367: 0.2392, 0.226733: 0.2392, 0.2401: 0.2392, 0.240133: 0.2392, 0.240167: 0.192197, 0.2402: 0.1922, 0.243467: 0.192495, 0.246733: 0.194819, 0.25: 0.17, 0.254167: 0.138343, 0.258333: 0.14654, 0.2625: 0.1498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
  CLI along r/R (cubic Bezier): 0.2: 0, 0.213333: 0, 0.226667: 0.0745, 0.24: 0.0785, 0.243333: 0.0795, 0.246667: 0.079968, 0.25: 0.08, 0.254167: 0.08004, 0.258333: 0.0804, 0.2625: 0.0806, 0.275: 0.0812, 0.2875: 0.0832, 0.3: 0.0844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
  Axial along r/R (linear): 0.2: 0, 0.24: 0, 0.25: 0.0027, 0.3: -0.0156, 0.35: -0.0265, 0.4: -0.0353, 0.45: -0.0425, 0.5: -0.0489, 0.55: -0.0544, 0.6: -0.059, 0.65: -0.0629, 0.7: -0.0663, 0.75: -0.0689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
  Tangential along r/R (linear): 0.2: 0, 0.25: -0.0016, 0.3: -0.009, 0.35: -0.0144, 0.4: -0.0166, 0.45: -0.0147, 0.5: -0.0094, 0.55: 0, 0.6: 0.0133, 0.65: 0.0311, 0.7: 0.0518, 0.75: 0.0772, 0.8: 0.1059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

VSPAERO settings: Sref=4.29594e+07 bref=7500 cref=5727.92 Xcg=527.141 Ycg=0 Zcg=0 AlphaStart=0 AlphaEnd=10 AlphaNpts=1 BetaStart=0 BetaEnd=0 BetaNpts=1 MachStart=0 MachEnd=0 MachNpts=1 ReCref=1.1e+07 Vinf=200 Rho=0.002377
