OpenVSP model (file version 5), 1 components.
Geometry view with OpenVSP parameter names; values to 6 digits, angles in degrees, lengths in the model's unit.
Overall bounding box: X_Min=-1.22036 X_Len=2.44087 Y_Min=-6.36704 Y_Len=18.1039 Z_Min=-10.4308 Z_Len=20.8625

Propeller "X-19 Blade 13166A10P3"
  location (X Y Z) 0 0 0, rotation 0 0 0
  bounding box size 2.44087 18.1039 20.8625
  Design: Diameter=23.4 NumBlade=3 Beta34=8.5 UseBeta34Flag=1 Feather=-33.9869 Rotate=0 Precone=0 ReverseFlag=0 FoldAngle=0 PropMode=0 AF=168.611 CLi=0.0554359 Chord=0.268073 Solidity=0.255991 ConstructXoC=0.5 FeatherAxisXoC=0.5 FeatherOffsetXoC=0
  cross sections:
    n   RadiusFrac  shape
    0   0.096       circle Circle_Diameter=0.65988
    1   0.115       ellipse Ellipse_Height=0.771864 Ellipse_Width=1.10916
    2   0.154       ellipse Ellipse_Height=0.97314 Ellipse_Width=3.3696
    3   0.192       ellipse Ellipse_Height=1.02617 Ellipse_Width=3.73698
    4   0.231       NACA 64-series A=1 Chord=3.75102 IdealCl=0.063 ThickChord=0.2492
    5   0.269       NACA 64-series A=1 Chord=3.75102 IdealCl=0.125 ThickChord=0.2324
    6   0.308       NACA 64-series A=1 Chord=3.75102 IdealCl=0.165 ThickChord=0.2192
    7   0.346       NACA 64-series A=1 Chord=3.75102 IdealCl=0.19 ThickChord=0.2064
    8   0.385       NACA 64-series A=1 Chord=3.75102 IdealCl=0.2 ThickChord=0.194
    9   0.462       NACA 64-series A=1 Chord=3.75102 IdealCl=0.2 ThickChord=0.168
    10  0.538       NACA 64-series A=1 Chord=3.75102 IdealCl=0.2 ThickChord=0.142
    11  0.615       NACA 64-series A=1 Chord=3.64104 IdealCl=0.194 ThickChord=0.1199
    12  0.692       NACA 64-series A=1 Chord=3.36258 IdealCl=0.13 ThickChord=0.10533
    13  0.769       NACA 64-series A=1 Chord=2.96478 IdealCl=0.05 ThickChord=0.092737
    14  0.846       NACA 64-series A=1 Chord=2.44296 IdealCl=0.002 ThickChord=0.0823
    15  0.923       NACA 64-series A=1 Chord=1.85094 IdealCl=0 ThickChord=0.074434
    16  0.962       NACA 64-series A=1 Chord=1.52802 IdealCl=0 ThickChord=0.0707
    17  0.987       NACA 64-series A=1 Chord=1.3352 IdealCl=0 ThickChord=0.0676963
    18  1           NACA 64-series A=1 Chord=1.1934 IdealCl=0 ThickChord=0.0654
  Chord along r/R (cubic Bezier): 0.096: 0.0564, 0.102333: 0.0728312, 0.108667: 0.0729185, 0.115: 0.0948, 0.128: 0.139715, 0.141: 0.27137, 0.154: 0.288, 0.166667: 0.304203, 0.179333: 0.315263, 0.192: 0.3194, 0.205: 0.323646, 0.218: 0.3206, 0.231: 0.3206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
  Twist along r/R (cubic Bezier): 0.096: 79.4, 0.102333: 78.9168, 0.108667: 78.4013, 0.115: 77.9, 0.128: 76.8711, 0.141: 75.9021, 0.154: 74.9, 0.166667: 73.9236, 0.179333: 72.8904, 0.192: 71.9, 0.205: 70.8835, 0.218: 69.8636, 0.231: 68.9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
  Thick along r/R (cubic Bezier): 0.096: 1, 0.102333: 0.920753, 0.108667: 0.835417, 0.115: 0.6959, 0.128: 0.409524, 0.141: 0.311516, 0.154: 0.2888, 0.166667: 0.266667, 0.179333: 0.278515, 0.192: 0.2746, 0.205: 0.270582, 0.218: 0.257595, 0.231: 0.2492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
  CLI along r/R (cubic Bezier): 0.096: 0, 0.102333: 0, 0.108667: 0, 0.115: 0, 0.128: 0, 0.141: 0, 0.154: 0, 0.166667: 0, 0.179333: 0, 0.192: 0.007, 0.205: 0.0141842, 0.218: 0.0400188, 0.231: 0.063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
